// COMSOL Multiphysics 6.2.0.415 model "in_param_sweep_analytical_deformation_source_param_def_0-4_03sep26_simple_C_R_15.mph"
// Outline of the model tree

Parameters
  C_R = 10.0[m]  // Conduit Radius
  C_L = 5000[m]  // Conduit Length
  C_A = pi*C_R^2  // Conduit Area
  G_solid = E_solid/(2*(1+nu_solid))  // G elastic shear modulus (Pa)
  r_inner = 15000[m]  // Radius of more dense meshed domain
  z_edifice = 1250[m]  // Relative height of volcano summit
  r_summit = 250[m]  // Radius of volcano summit
  x_edifice = 2000[m]  // Radius of volcano slope
  z0 = z_edifice  // Position of ground level at r = 0
  w_inf = 1000[m]
  wtSiO2 = 73.10
  wtTiO2 = 0.75
  wtAl2O3 = 13.10
  wtFeO = 2.59
  wtMnO = 0.07
  wtMgO = 0.38
  wtCaO = 1.41
  wtNa2O = 3.93
  wtK2O = 3.74
  wtP2O5 = 0.22
  sio2 = 60.085[g/mol]
  tio2 = 79.88[g/mol]
  al2o3 = 101.96[g/mol]
  feo = 71.85[g/mol]
  mno = 70.94[g/mol]
  mgo = 40.30[g/mol]
  cao = 56.08[g/mol]
  na2o = 61.98[g/mol]
  k2o = 94.2[g/mol]
  p2o5 = 141.94[g/mol]
  h2o = 18.001[g/mol]
  param_def = 1  // Deformation Source Mechanism Parameter
  rho_e = 2650[kg/m^3]
  g = 9.81[m/s^2]
  P_a = 0.1[MPa]
  sb_ramp = 1
  c_edifice = (z_edifice/x_edifice)*(r_summit+C_R)
  m_edifice = (z_edifice/x_edifice)
  mesh_n = 5
  E_solid = 1[GPa]  // Young's Modulus of Solid Rock
  nu_solid = 0.25
  slope_angle = atan(z_edifice/x_edifice)
  slope_grid_spacing = 5/cos(slope_angle)
  grid_spacing = 5[m]
  grid_flat = (r_inner-(C_R+r_summit+x_edifice))/grid_spacing
  P_in = 20[MPa]
  z_tau = C_L
  edifice_slope_theta = atan(z_edifice/x_edifice)
  edifice_slope_deg = edifice_slope_theta*180/pi
  C_source = 100[m]
  C_depth = 10[m]

Functions
  an5: Analytic | funcname = rm_sb; expr = min(1,max(0,(x+sb_3_buffer)*(-sb_ramp/(C_L-100))))
  an6: Analytic | funcname = an_edifice_old; expr = x*-(z_edifice/x_edifice)+(z_edifice/x_edifice)*(r_summit+C_R)
  pw1: Piecewise "Gradient Excess Pressure" | funcname = P_ex_rm1; arg = z; extrap = value; pieces = {-(C_depth+C_source), -C_depth, -(P_in/C_source)*(z+C_depth)}; argunit = m; fununit = Pa
  pw2: Piecewise "Full Excess Pressure" | funcname = P_ex_step; arg = z; extrap = value; pieces = {-(C_source+C_depth), -C_depth, P_in}; argunit = m; fununit = Pa
  pw3: Piecewise "Shear Stress at conduit wall" | funcname = tau_w_step; arg = z; extrap = value; pieces = {-C_depth-C_source, -C_depth, (C_R/2)*(P_in/C_source)}; argunit = m; fununit = Pa
  pw4: Piecewise
    funcname = an_edifice
    pieces = 
      {C_R, C_R+r_summit, 0}
      {r_summit+C_R, C_R+r_summit+x_edifice, x*-(z_edifice/x_edifice)+(z_edifice/x_edifice)*(r_summit+C_R)}
      {C_R+r_summit+x_edifice, C_R+r_summit+x_edifice+3000, -z_edifice}

Variables
  var16 "Defomation Source Mechanism Variables"
    tau_ss = if(param_def<2,tau_w_step(z),0)
    p_ex = if(param_def==0,0,if(param_def>2,P_ex_step(z),P_ex_rm1(z)))
    p_ex_top = if(param_def==4,P_in,0)
  var23 "Basic Deformation"
    tau = (C_R/2)*(P_in/C_source)

Couplings
  maxop1: Maximum on boundaries 9, 11-18
  minop1: Minimum on boundaries 9, 11-18
  minop2: Minimum "Minimum_r>100m" on boundaries 12-18
  maxop2: Maximum "Maximum_r>100m" on boundaries 12-18

Coordinate systems
  ie1: InfiniteElement "Infinite Element Domain 1" on domains 1, 4, 5 | ScalingType = Cylindrical

Geometry
  geom1 "Geometry 1" (2D axisymmetric, length unit m)
    r1: Rectangle | pos = {0, -(z_edifice+5000)}; size = {C_R, (z_edifice-C_depth+5000)}
    r2: Rectangle | pos = {0, -(z_edifice+5000)}; size = {C_R, (z_edifice-C_depth+5000)}
    b1: BezierPolygon "Bézier Polygon 4"
      p = 
        {C_R, C_R+r_summit, r_summit+x_edifice+C_R, r_inner, r_inner, 0, 0, 0}
        {z_edifice, z_edifice, 0, 0, -r_inner, -r_inner, z_tau, z_edifice}
      degree = {1, 1, 1, 1, 1, 1, 1}
      w = {1, 1, 1, 1, 1, 1, 1, 1, 1, 1, 1, 1, 1, 1}
    r3: Rectangle | pos = {r_inner, -r_inner}; size = {w_inf, r_inner}
    r4: Rectangle | pos = {0, -r_inner-w_inf}; size = {r_inner, w_inf}
    sq1: Square | pos = {r_inner, -r_inner-w_inf}; size = w_inf
    mov1: Move | input = b1, r3, r4, sq1; displx = 0; disply = -z_edifice
    dif1: Difference | input = mov1(1), mov1(3); input2 = r2
    pt1: Point "Point 100 m" | p = {100, }
    pt2: Point "Point 250 m" | p = {250, 0}
    pt3: Point "Point 500 m" | p = {500, an_edifice(500)}
    pt4: Point "Point 1000 m" | p = {1000, an_edifice(1000)}
    pt5: Point "Point 2000 m" | p = {2000, an_edifice(2000)}
    fin: Finalize "Form Union"

Physics
  solid: SolidMechanics on domains 1, 2, 4, 5
    dependent variable u2 = {u2, v2, w2}
    AdvancedSettings.GroupPhysOdesRc = 0
    AdvancedSettings.GroupPhysOdesAtt = 0
    AdvancedSettings.GroupPhysOdesRd = 0
    lemm1: LinearElasticModel "Linear Elastic Material 1" (default)
      E_mat = userdef
      E = E_solid
      nu_mat = userdef
      nu = nu_solid
      rho_mat = userdef
      rho = rho_e
    axi1: AxialSymmetrySolid "Axial Symmetry 1" (default)
    free1: Free (default)
    init1: init "Initial Values 1" (default)
    fix1: Fixed "Fixed Constraint - bottom of IE domain" on boundaries 2, 20
    roll1: Roller "Roller - Side of IE domain" on boundaries 24, 25 | NormalAxis = zAxis
    bndl1: BoundaryLoad "Boundary Load - Conduit Wall - Analytical Source of Deformation" on boundaries 10
      FperArea = {-tau_ss, 0, -p_ex}
      coordinateSystem = sys1
    bndl2: BoundaryLoad "Boundary Load - Conduit Top - Analytical Source of Deformation" on boundaries 8
      FperArea = {0, 0, -p_ex_top}
      coordinateSystem = sys1

Mesh
  mesh1 "Mesh with Solid Mechanics"
    size3: Size on boundaries 9, 11-17 | hmax = 10; hauto = 2; custom = on
    size2: Size on boundaries 8, 10 | table = cfd; hauto = 4; custom = on; hmax = 1
    dis8: Distribution on boundaries 8 | numelem = C_R[1/m]
    dis2: Distribution on boundaries 10 | elemcount = 500
    dis3: Distribution "Inf Elements" on boundaries 1, 19, 20, 22, 24
    map2: Map "Mapped 2" on domains 1, 4, 5
    dis1: Distribution "Conduit Wall" (disabled) on boundaries 10
      type = predefined
      reverse = on
      elemcount = 2000
      elemratio = 250
    ftri1: FreeTri "Free Triangular 1" on domains 2
  mesh4 "Mesh with Solid Mechanics 1"
    size: MeshSizeDefault | hauto = 6
    size3: Size on boundaries 12-17 | hmax = 10; hauto = 2; custom = on
    size5: Size on boundaries 11 | hmax = 5; hauto = 2; custom = on
    size2: Size on boundaries 8, 10 | table = cfd; hmax = 0.5; hauto = 4; custom = on
    size4: Size on boundaries 7, 8, 10 | table = cfd; hmax = 0.5; hauto = 4; custom = on
    dis8: Distribution on boundaries 8, 9 | numelem = C_R*3[1/m]
    dis2: Distribution on boundaries 10 | elemcount = C_L
    dis3: Distribution "Inf Elements" on boundaries 1, 19, 20, 22, 24
    map2: Map "Mapped 2" on domains 1, 4, 5
    dis1: Distribution "Conduit Wall" (disabled) on boundaries 10
      type = predefined
      reverse = on
      elemcount = 2000
      elemratio = 250
    ftri1: FreeTri "Free Triangular 1" on domains 2

Studies
  std7 "Study - Deformation - Analytical Deformation Source"
    param5: Parametric "Parametric Sweep 5" | pname = C_R; plistarr = 15; punit = m
    param: Parametric "Parametric Sweep - Topography y/n" | pname = z_edifice; plistarr = 0; punit = m
    param3: Parametric "Parametric Sweep - Conduit Length"
      pname = C_source
      plistarr = 10,25,50,100,250,500,1000,2500,5000
      punit = m
    param4: Parametric "Parametric Sweep - Source Depth" | pname = C_depth; plistarr = 10^range(1,0.2,3); punit = m
    param2: Parametric "Parametric Sweep - Deformation Mechanism"
      sweeptype = filled
      pname = {param_def, P_in}
      plistarr = {"0,3,4", 20e6}
      punit = {, Pa}
    stat: Stationary | mesh = {geom1, mesh4}
  std8 "Study - Deformation - Example plot"
    param1: Parametric "Parametric Sweep - Topography y/n" | pname = z_edifice; plistarr = 0,1000,1500,2000; punit = m
    param3: Parametric "Parametric Sweep - Conduit Length" | pname = C_source; plistarr = 500; punit = m
    param4: Parametric "Parametric Sweep - Source Depth" | pname = C_depth; plistarr = 250; punit = m
    param: Parametric "Parametric Sweep - conduit radius" | pname = C_R; plistarr = 15; punit = m
    param2: Parametric "Parametric Sweep - Deformation Mechanism"
      sweeptype = filled
      pname = {param_def, P_in}
      plistarr = {"0,3,4", 20[MPa]}
      punit = {, Pa}
    stat: Stationary | mesh = {geom1, mesh1}

Solver configurations
  sol1 "Solution 1" (study std7)
    v1: Variables "Dependent Variables 1"
    s1: Stationary "Stationary Solver 1"
      dDef: Direct
      fc1: FullyCoupled | linsolver = dDef
  sol393 "Solution 393" (study std8)
    // same settings as sol1
  sol394 "Parametric Solutions 2" (study std8)
  sol1137 "Parametric Solutions 3" (study std7)

Datasets
  dset15: Solution | solution = sol393
  dset16: Solution | solution = sol394
  dset3: Solution | solution = sol1
  edg2: Edge2D "Example_Edge_param" on boundaries 9, 11-18 | data = dset16
  dset16solidrev: Revolve2D "Revolution 2D 3" | data = dset16; startangle = -90; revangle = 225
  dset17: Solution | solution = sol1137
  edg3: Edge3D
  edg4: Edge2D "Sweep - GE" on boundaries 9, 11-18 | data = dset17
  max1: Maximum "Maximum - GE" | data = edg4
  min1: Minimum "Minimum - GE" | data = edg4

Plots
  pg6: PlotGroup2D "Stress (solid) 2" | data = dset17
    surf1: Surface | expr = solid.disp
    arws1: ArrowSurface | expr = {u2, w2}; xnumber = 150; ynumber = 150
  pg7: PlotGroup3D "Stress, 3D (solid) 2" | data = dset16solidrev
    surf1: Surface | expr = solid.misesGp
      def: Deform "Deformation" | revcoordsys = cylindrical; expr = {u2, v2, w2}; descr = Displacement field
  pg12: PlotGroup1D "topography" | data = dset16
    lngr1: LineGraph on boundaries 9, 11-18 | expr = an_edifice(r); xdata = expr; xdataexpr = r
  pg9: PlotGroup1D "Ur" | data = dset16
    lngr1: LineGraph on boundaries 11-17 | expr = u2/C_R^2; xdata = expr; xdataexpr = r
  pg10: PlotGroup1D "Max Tilt (+ve/-ve) (Deformation - Pressure + Pressure Top)"
    data = none
    xlabel = Source Depth
    ylabel = Max tilt on surface
    ptgr2: PointGraph (disabled) on points 5
      data = dset16
      expr = if(maxop1(solid.RotrZ)==maxop1(abs(solid.RotrZ)), maxop1(solid.RotrZ), minop1(solid.RotrZ))
      unit = urad
    ptgr3: PointGraph (disabled) on points 5
      data = dset16
      expr = if(maxop1(solid.RotrZ)==maxop1(abs(solid.RotrZ)), maxop1(solid.RotrZ), minop1(solid.RotrZ))
      unit = urad
    ptgr4: PointGraph (disabled) on points 5
      data = dset16
      expr = if(maxop1(solid.RotrZ)==maxop1(abs(solid.RotrZ)), maxop1(solid.RotrZ), minop1(solid.RotrZ))
      unit = urad
    ptgr5: PointGraph (disabled) on points 5
      data = dset16
      expr = if(maxop1(solid.RotrZ)==maxop1(abs(solid.RotrZ)), maxop1(solid.RotrZ), minop1(solid.RotrZ))
      unit = urad
  pg11: PlotGroup1D "Max Tilt (+ve/-ve) (Deformation - Pressure + Pressure Top) 1"
    data = none
    xlabel = Source Depth
    ylabel = Max tilt on surface
    ptgr1: PointGraph on points 5
      data = dset16
      expr = if(maxop1(solid.RotrZ)==maxop1(abs(solid.RotrZ)), maxop1(solid.RotrZ), minop1(solid.RotrZ))
      unit = urad
    ptgr2: PointGraph on points 5
      data = dset16
      expr = if(maxop1(solid.RotrZ)==maxop1(abs(solid.RotrZ)), maxop1(solid.RotrZ), minop1(solid.RotrZ))
      unit = urad
    ptgr3: PointGraph on points 5
      data = dset16
      expr = if(maxop1(solid.RotrZ)==maxop1(abs(solid.RotrZ)), maxop1(solid.RotrZ), minop1(solid.RotrZ))
      unit = urad
    ptgr4: PointGraph on points 5
      data = dset16
      expr = if(maxop1(solid.RotrZ)==maxop1(abs(solid.RotrZ)), maxop1(solid.RotrZ), minop1(solid.RotrZ))
      unit = urad
    ptgr5: PointGraph on points 5
      data = dset16
      expr = if(maxop1(solid.RotrZ)==maxop1(abs(solid.RotrZ)), maxop1(solid.RotrZ), minop1(solid.RotrZ))
      unit = urad
  pg13: PlotGroup1D "1D Plot Group 13" | data = dset16
    ptgr1: PointGraph on points 6 | expr = tau
  pg14: PlotGroup1D "Uz 1" | data = dset17
    lngr1: LineGraph on boundaries 9, 11-17 | expr = u2; xdata = expr; xdataexpr = r
  pg15: PlotGroup1D "1D Plot Group 15" | data = dset17
    lngr1: LineGraph on boundaries 10 | expr = z; xdata = expr; xdataexpr = -p_ex

Exports
  data2: Data "Max - Sweep - GE"
    data = max1
    expr = {u2, v2, w2, solid.RotrZ, }
    unit = {m, m, m, rad, }
    descr = {"Displacement field, R-component", "Displacement field, PHI-component", "Displacement field, Z-component", "Rotation of deformation tensor, rZ component", }
    filename = /Users/elioteaton/Documents/Paper1_figures/simple_geodetic_model/full_comparison/GE_max_29may2026.txt
    sort = on
    separator = ;
  data3: Data "min - Sweep - GE"
    data = min1
    expr = {u2, v2, w2, solid.RotrZ, }
    unit = {m, m, m, rad, }
    descr = {"Displacement field, R-component", "Displacement field, PHI-component", "Displacement field, Z-component", "Rotation of deformation tensor, rZ component", }
    filename = /Users/elioteaton/Documents/Paper1_figures/simple_geodetic_model/full_comparison/GE_min_29may2026.txt
    sort = on
    separator = ;